// COMSOL Multiphysics 6.1.0.282 model "TD Guide WR 90 2024.mph"
// TP Guide WR 90
// Outline of the model tree

Parameters
  w = 0.9[in]
  hauteur = 0.4[in]
  l = 6[cm]
  f = 10e9[Hz]
  c = 3e8[m/s]
  lambda = c/f
  r_sphere = 3*lambda
  e = lambda/8
  fc = c/(2*(w))
  beta = 2*pi*sqrt(f^2-fc^2)/c

Selections
  sel6: Explicit "Metal" on no domains
  com1: Complement "Domaine calcul" | entitydim = 3; input = {sel6}
  sel10: Explicit "PML" on domains 4, 6
  com2: Complement "Tetrahedres" | entitydim = 3; input = {sel6, sel10}

Coordinate systems
  pml1: PML "Perfectly Matched Layer 1" on domains 4, 6 | ScalingType = Spherical; r0 = {0, -lambda/8, 0}
  pml2: PML "Perfectly Matched Layer 2" on domains 3 | raxis = {0, 1, 0}

Geometry
  geom1 "Geometry 1" (3D, length unit m)
    blk1: Block | pos = {0, -l/2, 0}; base = center; size = {w, l, hauteur}; layerbottom = off
    sph1: Sphere | pos = {0, -lambda/8, 0}; layername = Layer 1; layer = lambda/8; r = r_sphere
    blk2: Block
      pos = {-r_sphere, -lambda/8, -r_sphere}
      size = {2*r_sphere, r_sphere, 2*r_sphere}
      layername = Layer 1
      layer = lambda/8
      layerfront = on
      layerbottom = off
    int1: Intersection | input = blk2, sph1
    blk3: Block | pos = {0, -l, 0}; size = {2*r_sphere, l+r_sphere, 2*r_sphere}
    uni1: Union | input = blk1, int1
    int2: Intersection | input = blk3, uni1
    del1: Delete "Delete Entities 1" (disabled) | input = int2 6
    del2: Delete "Delete Entities 2" (disabled) | input = del1(1) edges 6, 8
    fin: Finalize "Form Union"

Materials
  mat1: Common "Air" on selection com1
    def "Basic"
      relpermeability = 1
      relpermittivity = 1
      dynamicviscosity = eta(T[1/K])[Pa*s]
      ratioofspecificheat = 1.4
      electricconductivity = 0[S/m]
      heatcapacity = Cp(T[1/K])[J/(kg*K)]
      density = rho(pA[1/Pa],T[1/K])[kg/m^3]
      thermalconductivity = k(T[1/K])[W/(m*K)]
      soundspeed = cs(T[1/K])[m/s]
      eta: Piecewise | arg = T; pieces = {200.0, 1600.0, -8.38278E-7+8.35717342E-8*T^1-7.69429583E-11*T^2+4.6437266E-14*T^3-1.06585607E-17*T^4}
      Cp: Piecewise | arg = T; pieces = {200.0, 1600.0, 1047.63657-0.372589265*T^1+9.45304214E-4*T^2-6.02409443E-7*T^3+1.2858961E-10*T^4}
      rho: Analytic | expr = pA*0.02897/8.314/T; args = {pA, T}; dermethod = manual; argders = {{pA, d(pA*0.02897/8.314/T,pA)}, {T, d(pA*0.02897/8.314/T,T)}}
      k: Piecewise | arg = T; pieces = {200.0, 1600.0, -0.00227583562+1.15480022E-4*T^1-7.90252856E-8*T^2+4.11702505E-11*T^3-7.43864331E-15*T^4}
      cs: Analytic | expr = sqrt(1.4*287*T); args = T; dermethod = manual; argders = {T, d(sqrt(1.4*287*T),T)}
    RefractiveIndex
      n = 1
      ki = 0

Physics
  emw: ElectromagneticWaves "Electromagnetic Waves, Frequency Domain" on domains 1-6
    dependent variable E = {Ex, Ey, Ez}
    wee1: WaveEquationElectric (default)
    pec1: PerfectElectricConductor (default)
    init1: init "Initial Values 1" (default)
    pec2: PerfectElectricConductor on boundaries 10, 25
    pmc1: PerfectMagneticConductor on boundaries 1, 5, 8, 11, 15, 19
    port1: Port on boundaries 2
      PortExcitation = on
      Pin = .25
      PortType = UserDefined
      PortModeNumber = 10
      beta = 2*pi*sqrt(emw.freq^2-fc^2)/c
      E0 = {0, 0, cos(pi*x/(w))}
      PortSlit = 0
      SlitType = PECBacked
      PortOffset = l
    ffd1: FarFieldDomain on domains 5
      ffc1: FarFieldCalculation on boundaries 18, 21
        SymmetryInPlane0 = 1
        SymmetryInPlane2 = 1
        SymmetryType2 = SymmetryInHz
        FarFieldBoundarySide = FarFieldBoundaryInside

Mesh
  mesh1 "Mesh 1"
    size: MeshSizeDefault | hmax = 0.0059960; hmin = 1.7990E-4; hauto = 9; custom = on
    dis1: Distribution on edges 9, 12, 13, 22, 27, 35, 39-41 | type = predefined
    ftet1: FreeTet "Free Tetrahedral 1" on domains 5
    swe1: Sweep "Swept 1" on domains 2-4, 6
      dis1: Distribution on domains 2-4, 6
    size1: Size on domains 1 | hauto = 2
    ftet2: FreeTet "Free Tetrahedral 2" on domains 1

Studies
  std1 "Study 1"
    freq: Frequency "Frequency Domain" | punit = GHz; plist = range(9,0.5,12)

Solver configurations
  sol1 "Solution 1" (study std1)
    v1: Variables "Dependent Variables 1"
    s1: Stationary "Stationary Solver 1" | stol = 0.01; linpmethod = sol
      p1: Parametric | pname = freq; plistarr = range(9,0.5,12); punit = GHz; pcontinuationmode = no
      fc1: FullyCoupled | linsolver = i1
      i1: Iterative "Suggested Iterative Solver (emw)" | itrestart = 300; prefuntype = right
        mg1: Multigrid | iter = 1

Datasets
  dset1: Solution | solution = sol1
  surf1: Surface on boundaries 4, 10, 24, 25 | data = dset1
  cln1: CutLine3D | data = dset1; genpoints = {{0, -l, 0}, {0, r_sphere, 0}}

Derived values
  gev2: EvalGlobal "Global Evaluation 2"
    data = dset1
    table = tbl4
    expr = emw.zref
    unit = Ω
    descr = Reference impedance

Tables
  ff1: Table "pg3/ff1"
    // Far field
    θ (deg) | φ (deg) | Directivity | Directivity (dB)
    90 | 88 | 4.89383 | 6.89648
  tbl1: Table
    // Global Evaluation 1 (emw.S11dB)
    freq | abs(emw.S11) | S-parameter, dB (dB)
    1e+10 | 0.316965 | -9.97977
  ff2: Table "Directivity"
    // Far field
    θ (deg) | φ (deg) | Directivity | Directivity (dB)
    90 | 88 | 4.89383 | 6.89648
  tbl2: Table
    // S-parameter, S11dB (emw) (emw.S11)
    freq | S11
    1e+10 | 0.303698+0.238551i
  ff3: Table "Beam width"
    // Far field
    freq (Hz) | Beam width (deg) | Null-to-null beam width (deg)
    1e+10 | 61.1267 | 187.2
  ff4: Table "Beam width 1"
    // Far field
    freq (Hz) | Beam width (deg) | Null-to-null beam width (deg)
    1e+10 | 61.1267 | 187.2
  ff5: Table "Beam width 2"
    // Far field
    freq (Hz) | Beam width (deg) | Null-to-null beam width (deg)
    1e+10 | 101.847 | 187.2
  tbl3: Table
    // S-parameter, S11dB (emw) (emw.S11dB)
    freq (GHz) | S11 (1)
    10 | 0.222374+0.0908018i
  ff6: Table "Beam width 3"
    // Far field
    freq (GHz) | Beamwidth (deg) | Null-to-null beamwidth (deg)
    10 | 67.8101 | 216
  ff7: Table "Beam width 4"
    // Far field
    freq (GHz) | Beam width (deg) | Null-to-null beam width (deg)
    10 | 112.131 | 288
  ff8: Table "Directivity 1"
    // Far field
    θ (deg) | φ (deg) | Directivity | Directivity (dB)
    90 | 88 | 4.48747 | 6.52002
  ff9: Table "Directivity 2"
    // Far field
    θ (deg) | φ (deg) | Directivity | Directivity (dB)
    90 | 88 | 5.59335 | 7.47672
  tbl4: Table
    // Global Evaluation 2
    freq (GHz) | Propagation constant (rad/m) | Reference impedance (Ω)
    9 | 129.013 | 50
    9.5 | 143.881 | 50
    10 | 158.046 | 50
    10.5 | 171.682 | 50
    11 | 184.906 | 50
    11.5 | 197.8 | 50
    12 | 210.426 | 50
  rp1: Table "Beam width 5"
    // Radiation pattern
    freq (GHz) | Beamwidth (deg) | Null-to-null beamwidth (deg)
    10 | 56.3278 | 216
  rp2: Table "Beam width 6"
    // Radiation pattern
    freq (GHz) | Beamwidth (deg) | Null-to-null beamwidth (deg)
    10 | 89.2914 | 259.2
  rp3: Table "Beam width 7"
    // Radiation pattern
    freq (GHz) | Beamwidth (deg) | Null-to-null beamwidth (deg)
    10 | 2.08573e-13 | 144
  rp4: Table "Beam width 8"
    // Radiation pattern
    freq (GHz) | Beam width (deg) | Null-to-null beam width (deg)
    10 | 11.6583 | 14.4
  tbl5: Table
    // Global Evaluation 3
    freq (GHz) | Voltage standing wave ratio (1)
    9 | 2.17475
    9.5 | 1.86207
    10 | 2.01384
    10.5 | 1.98899
    11 | 2.04085
    11.5 | 1.83895
    12 | 1.82451
  tbl6: Table
    // Global Evaluation 4
    freq (GHz) | abs(emw.S11) (1)
    9 | 0.37003
    9.5 | 0.301206
    10 | 0.336394
    10.5 | 0.330878
    11 | 0.342289
    11.5 | 0.295515
    12 | 0.291912
  evlsmith: Table "Smith evaluation"
    // Interactive Smith coordinates
    Reflection | Impedance | Admittance
    -0.157895-0.0846682i | 0.718086-0.125631i | 1.35123+0.236401i
    0.631436-0.0460705i | 4.34299-0.667873i | 0.224937+0.0345912i
    -0.512195+0.360434i | 0.251482+0.298292i | 1.65208-1.95959i
    -0.0135502-0.284553i | 0.829093-0.513515i | 0.871726+0.539921i
  rp5: Table "Beamwidth"
    // Radiation pattern
    freq (GHz) | Beamwidth (deg) | Null-to-null beamwidth (deg)
    10 | 110.908 | 259.2
  rp6: Table "Beamwidth 1"
    // Radiation pattern
    freq (GHz) | Beamwidth (deg) | Null-to-null beamwidth (deg)
    10 | 110.691 | 259.2

Plots
  pg1: PlotGroup3D "Electric Field (emw)" | data = dset1
    mslc1: Multislice
      expr = abs(emw.Ez)
      multiplanexmethod = coord
      xcoord = 0
      multiplaneymethod = coord
      ycoord = -l,0
      multiplanezmethod = coord
      zcoord = 0
  pg2: PolarGroup "2D Far Field (emw)" | data = dset1
    ff1: RadiationPattern "Far Field 1"
      expr = (emw.normEfar)
      phidisc = 100
      beamwidth = on
      leveldown = 3
      refdir = {0, 1, 0}
      table = rp1
    ff2: RadiationPattern "Far Field 2"
      expr = (emw.normEfar)
      phidisc = 100
      beamwidth = on
      leveldown = 3
      normal = {1, 0, 0}
      refdir = {0, 1, 0}
      table = rp2
  pg3: PlotGroup3D "3D Far Field (emw)" | data = dset1
    ff1: RadiationPattern "Far Field 1"
      expr = emw.normEfar
      thetadisc = 45
      phidisc = 45
      anglerestr = manual
      directivity = on
      directivityexpr = emw.normEfar^2
      table = ff8
  pg4: PlotGroup1D "1D Plot Group 4" | data = dset1; manualgrid = on; xspacing = 10
    ff1: RadiationPattern "Far Field 1"
      expr = emw.normEfar
      descr = Far-field norm
      anglerestr = manual
      phimin = -180
      refdir = {0, 1, 0}
      table = rp3
    ff2: RadiationPattern "Far Field 2"
      expr = emw.normEfar
      descr = Far-field norm
      anglerestr = manual
      phimin = -180
      leveldown = 3
      normal = {1, 0, 0}
      refdir = {0, 1, 0}
      table = rp4
  pg5: PlotGroup1D "1D Plot Group 5" | data = dset1
    ff1: RadiationPattern "Far Field 1"
      expr = emw.gaindBEfar
      descr = Far-field gain, dBi
      anglerestr = manual
      phimin = -180
      beamwidth = on
      leveldown = 3
      refdir = {0, 1, 0}
      table = ff6
    ff3: RadiationPattern "Far Field 3"
      expr = emw.gaindBEfar
      descr = Far-field gain, dBi
      anglerestr = manual
      phimin = -180
      beamwidth = on
      leveldown = 3
      normal = {1, 0, 0}
      refdir = {0, 1, 0}
      table = rp6
  pg7: PlotGroup1D "1D Plot Group 7" | data = cln1
    lngr1: LineGraph | expr = (abs(emw.Ez)); xdataexpr = emw.y
  pg8: PlotGroup1D "1D Plot Group 8" | data = dset1
    rp1: RadiationPattern
      expr = emw.rGaindBEfar
      descr = Realized far-field gain, dBi
      phidisc = 100
      anglerestr = manual
      phimin = -180
      beamwidth = on
      leveldown = 3
      normal = {1, 0, 0}
      refdir = {0, 1, 0}
      table = rp5
  pg9: PlotGroup1D "1D Plot Group 9" | data = dset1
    glob1: Global | expr = emw.S11dB; unit = 1; descr = S11
  pg10: SmithGroup "Smith Plot Group 10" | data = dset1; impedance = off; admittance = on
    rgr1: ReflectionGraph | expr = emw.dS11; unit = 1; descr = De-embedded S11
  pg6: PlotGroup3D "3D Far Field (emw) 1" | data = dset1
    ff1: RadiationPattern "Far Field 1"
      expr = emw.normEfar/400
      thetadisc = 45
      phidisc = 45
      directivity = on
      table = ff9
    surf1: Surface | data = surf1; expr = 1